# Initialization

units		  metal
dimension 	      3
boundary	  p p p
atom_style	 atomic


# Atom Definition

read_data atom_definition.txt


# Settings

pair_style lj/cubic
pair_coeff * * 0.0104 3.4


velocity         all create 400 12345 mom yes rot yes dist gaussian
timestep         0.0001
fix              1 all nve


dump myDump all custom 200 trajectory.txt id element x y z
dump_modify myDump element Ar sort id

thermo 200


# Run a simulation

run              100000

print "All done!"
