# Initialization

units		  metal
dimension 	      3
boundary	  f f f
atom_style	 atomic


# Atom Definition

read_data atom_definition.txt


# Settings

pair_style meam
pair_coeff	* * library.meam Al NULL Al

velocity         all create 300 12345 mom yes rot yes dist gaussian
timestep         0.001
fix              1 all nvt temp 300 1000 $(100.0*dt) drag 0.0 tchain 1
fix              2 all recenter INIT INIT INIT


dump myDump all custom 200 trajectory.txt id element x y z
dump_modify myDump element Al sort id

thermo_style custom step temp pe ke etotal
thermo 200

# Run a simulation

run              2000000

print "All done!"
